# OpenSim document version 40600
Model:
  Ground:
    PhysicalOffsetFrame ground_offsetframe: socket_parent=.. translation=(0 0.5 0) [meters]
      Brick ground_offsetframe_geom_1: half_lengths=(0.001 0.1 0.15)
  BodySet:
    Body finger_seg: mass=0.1 [kg] mass_center=(0 0 0) inertia=(0.008125 0.00125 0.008125 0 0 0)
      PhysicalOffsetFrame finger_seg_offsetframe: socket_parent=.. translation=(-1.801863e-10 -0.1 0)
          orientation=(0 0 2.73177e-17) [radians]
        Sphere finger_seg_offsetframe_geom_1: radius=0.005
      Cylinder finger_seg_geom_1: radius=0.025 half_height=0.1
  JointSet:
    PinJoint: socket_parent_frame=ground_offset socket_child_frame=finger_seg_offset
      Coordinate rz: default_value=0.1336922 range=(-1.570796 1.570796) clamped=true
      PhysicalOffsetFrame ground_offset: socket_parent=/ground translation=(0 0.5 0)
      PhysicalOffsetFrame finger_seg_offset: socket_parent=/bodyset/finger_seg translation=(0 0.1 0)
          orientation=(0 0 -1.570796)
  ForceSet:
    Blankevoort1991Ligament top_lhs_ligament: slack_length=0.1 [m]
      PathPoint: ground (0 0.5731435 -0.09950898)
      PathPoint pathpoint_0: finger_seg (0.01767767 -0.06 -0.017678)
    Blankevoort1991Ligament top_rhs_ligament: slack_length=0.1
      PathPoint: ground (0 0.5572912 0.09840603)
      PathPoint pathpoint_0: finger_seg (0.01767767 -0.08 0.01767767)
    Blankevoort1991Ligament bottom_lhs_ligament: slack_length=0.1
      PathPoint: ground (0 0.4297596 -0.1098214)
      PathPoint pathpoint_0: finger_seg (-0.01767767 -0.04 -0.01767767)
    Blankevoort1991Ligament bottom_rhs_ligament: appliesForce=false slack_length=0.1
      PathPoint: ground (0 0.4381562 0.06258684)
      PathPoint pathpoint_0: finger_seg (-0.01767767 -0.02 0.01767767)
    BushingForce: socket_frame1=/ground socket_frame2=/bodyset/finger_seg rotational_stiffness=(0 0 0) [Nm/rad]
        rotational_damping=(0 0 0.01) [Nm/(rad/s)]
